<Lems xmlns="http://www.neuroml.org/lems/0.7.2" xmlns:xsi="http://www.w3.org/2001/XMLSchema-instance" xsi:schemaLocation="http://www.neuroml.org/lems/0.7.2  https://raw.githubusercontent.com/LEMS/LEMS/development/Schemas/LEMS/LEMS_v0.7.2.xsd">

    <Target component="sim1" reportFile="/home/padraig/neuroConstruct/osb/cerebral_cortex/neocortical_pyramidal_neuron/MainenEtAl_PyramidalCell/neuroConstruct/simulations/Sim_124/simulator.props" timesFile="/home/padraig/neuroConstruct/osb/cerebral_cortex/neocortical_pyramidal_neuron/MainenEtAl_PyramidalCell/neuroConstruct/simulations/Sim_124/time.dat"/>

        <!--Include standard NeuroML 2 ComponentType definitions-->

    <Include file="Cells.xml"/>
    <Include file="Networks.xml"/>
    <Include file="Simulation.xml"/>

        <!--Include the generated NeuroML 2 files-->

        <!--   Channel/synapse files-->
    <Include file="K_ChannelML.channel.nml"/>
    <Include file="LeakCond.channel.nml"/>
    <Include file="Na_ChannelML.channel.nml"/>
        <!--   Cell files-->
    <Include file="MainenNeuroML.cell.nml"/>
        <!--   Network file-->
    <Include file="MainenEtAl_PyramidalCell.net.nml"/>

        <!--Note: this could be: Simulation id="sim1" ... , but Component type="Simulation" ...
        is used to allow validation of this file according to the LEMS schema specified above...-->
    <Component type="Simulation" id="sim1" length="60.0ms" step="0.01ms" target="network_MainenEtAl_PyramidalCell">

        <Display id="NeuroMLBased_v" title="MainenEtAl_PyramidalCell: SomaStimNeuroML, NeuroMLBased, VOLTAGE, VOLTAGE, VOLTAGE" xmin="-6.0" xmax="66.0" ymin="-105.0" ymax="75.0" timeScale="1ms">
            <Line id="v" timeScale="1ms" quantity="NeuroMLBased/0/MainenNeuroML/4197/v" scale="1 mV" color="#000000"/>

            <Line id="v" timeScale="1ms" quantity="NeuroMLBased/0/MainenNeuroML/5649/v" scale="1 mV" color="#ff0000"/>

            <Line id="v" timeScale="1ms" quantity="NeuroMLBased/0/MainenNeuroML/0/v" scale="1 mV" color="#0000ff"/>
        </Display>

        <OutputFile id="DendXML_0_4197_OF" fileName="NeuroMLBased_0.4197.dat">
            <OutputColumn id="v" quantity="NeuroMLBased/0/MainenNeuroML/4197/v"/>
        </OutputFile>

        <OutputFile id="IsegXML_0_5649_OF" fileName="NeuroMLBased_0.5649.dat">
            <OutputColumn id="v" quantity="NeuroMLBased/0/MainenNeuroML/5649/v"/>
        </OutputFile>

        <OutputFile id="NeuroMLBased_v_0_0_OF" fileName="NeuroMLBased_0.0.dat">
            <OutputColumn id="v" quantity="NeuroMLBased/0/MainenNeuroML/0/v"/>
        </OutputFile>
    </Component>

</Lems>
